# OpenSim document version 10600
Model Rat Hindlimb Right:
  credits: Model authors names..
  publications: List of publications related to model...
  length_units: mm
  force_units: N
  defaults: Thelen2003Muscle default: muscle_model=9 max_isometric_force=1000 optimal_fiber_length=0.1
      tendon_slack_length=0.2 pennation_angle=0 activation_time_constant=0.01 deactivation_time_constant=0.04 Vmax=10
      Vmax0=5 FmaxTendonStrain=0.033 FmaxMuscleStrain=0.6 KshapeActive=0.5 KshapePassive=4 damping=0.05 Af=0.3 Flen=1.8
  DynamicsEngine:
    SimbodyEngine: gravity=(0 -9.80665 0)
      BodySet:
        Body ground: mass=100 mass_center=(0 0 0) inertia_xx=40 inertia_yy=40 inertia_zz=40 meshes=ground.vtp
        Body spine: mass=0.12 mass_center=(0 0 0) inertia_xx=0.0000048 inertia_yy=0.0000048 inertia_zz=0.0000048
            meshes=spine.vtp
          CustomJoint ground_spine: parent_body=ground location_in_parent=(0 0 0) location=(0 0 0)
            Coordinate sacrum_pitch: default_value=0.5235988 initial_value=0.5235988 tolerance=0.00000001 stiffness=0
                range=(-1.570796 1.570796) clamped=true restraint_active=false
            Coordinate sacrum_roll: default_value=0 initial_value=0 tolerance=0.00000001 stiffness=0
                range=(-1.570796 1.570796) clamped=true restraint_active=false
            Coordinate sacrum_yaw: default_value=0 initial_value=0 tolerance=0.00000001 stiffness=0
                range=(-1.570796 1.570796) clamped=true restraint_active=false
            Coordinate sacrum_x: default_value=0 initial_value=0 tolerance=0.00000001 stiffness=0 range=(-0.1 0.25)
                clamped=true restraint_active=false
            Coordinate sacrum_y: default_value=0.05 initial_value=0.05 tolerance=0.00000001 stiffness=0 range=(0 0.2)
                clamped=true restraint_active=false
            Coordinate sacrum_z: default_value=0 initial_value=0 tolerance=0.00000001 stiffness=0 range=(-0.1 0.1)
                clamped=true restraint_active=false
            TransformAxis r1: coordinate=sacrum_pitch axis=(0 0 1)
            TransformAxis r2: coordinate=sacrum_roll axis=(1 0 0)
            TransformAxis r3: coordinate=sacrum_yaw axis=(0 1 0)
            TransformAxis tx: coordinate=sacrum_x is_rotation=false axis=(1 0 0)
            TransformAxis ty: coordinate=sacrum_y is_rotation=false axis=(0 1 0)
            TransformAxis tz: coordinate=sacrum_z is_rotation=false axis=(0 0 1)
        Body pelvis: mass=0.02 mass_center=(0 0 0) inertia_xx=0.000004 inertia_yy=0.0000035 inertia_zz=0.0000035
            meshes=pelvis.vtp
          WrapCylinder hip_cylinder_small: xyz_body_rotation=(0 1.48353 0) translation=(0.01 0.002 -0.0045) quadrant=-x
              radius=0.005 length=0.06
          WrapCylinder hip_cylinder_small2: xyz_body_rotation=(0 1.48353 0) translation=(0.01 0.001 -0.0045)
              quadrant=all radius=0.005 length=0.06
          WrapCylinder hip_cylinder_large2: xyz_body_rotation=(0 1.48353 0) translation=(0.01 0.004 0.003) quadrant=-x
              radius=0.0025 length=0.06
          CustomJoint sacroiliac: parent_body=spine location_in_parent=(0.005 -0.003 0.01) location=(0 0 0)
            Coordinate sacroiliac_flx: default_value=0.06457718 initial_value=0.06457718 tolerance=0.00000001
                stiffness=0 range=(-0.02301246 0.1515205) clamped=true locked=true restraint_active=false
            TransformAxis r1: coordinate=sacroiliac_flx axis=(0 0 1)
        Body femur: mass=0.02 mass_center=(0 -0.015 0) inertia_xx=0.00000162 inertia_yy=0.00000025
            inertia_zz=0.00000162 meshes=femur.vtp
          WrapCylinder femur_prox: xyz_body_rotation=(0 0.4363323 0) translation=(0.001 -0.006 0) quadrant=-x
              radius=0.0046 length=0.05
          WrapCylinder femur_prox2: xyz_body_rotation=(0 0.4363323 0) translation=(0.001 -0.006 0) quadrant=all
              radius=0.0046 length=0.05
          WrapTorus femur_dist: xyz_body_rotation=(1.724888 0 0.09774542) translation=(0.00543 -0.03003 -0.00046)
              quadrant=all inner_radius=0.004 outer_radius=0.006
          WrapCylinder femur_shaft_large: xyz_body_rotation=(1.724888 0 -0.7853982)
              translation=(-0.00064 -0.015595 0.00185) quadrant=y radius=0.0027 length=0.03058
          WrapCylinder femur_shaft_small: xyz_body_rotation=(1.724888 0 0.09774542)
              translation=(-0.00064 -0.015095 0.00185) quadrant=all radius=0.0018 length=0.02958
          CustomJoint hip: parent_body=pelvis location_in_parent=(0 0 0) location=(0 0 0)
            Coordinate hip_flx: default_value=0.6981317 initial_value=0.6981317 tolerance=0.00000001 stiffness=0
                range=(-0.8726646 1.22173) clamped=true restraint_active=false
            Coordinate hip_add: default_value=-0.1745329 initial_value=-0.1745329 tolerance=0.00000001 stiffness=0
                range=(-0.8726646 0.3490659) clamped=true restraint_active=false
            Coordinate hip_int: default_value=0 initial_value=0 tolerance=0.00000001 stiffness=0
                range=(-0.8726646 0.6981317) clamped=true restraint_active=false
            TransformAxis r1: coordinate=hip_flx axis=(0 0 1)
            TransformAxis r2: coordinate=hip_add axis=(1 0 0)
            TransformAxis r3: coordinate=hip_int axis=(0 1 0)
        Body tibia: mass=0.02 mass_center=(0 0.015 0) inertia_xx=0.00000162 inertia_yy=0.00000025 inertia_zz=0.00000162
            meshes=tibia.vtp
          WrapSphere tibia_prox: translation=(0.00062 0.0346 -0.001) quadrant=all radius=0.005
          WrapCylinder tibia_shaft: xyz_body_rotation=(1.570796 0 0) translation=(0 0.0241 0) quadrant=all
              radius=0.0035 length=0.0282
          WrapCylinder tibia_shaft2: xyz_body_rotation=(1.570796 0 0) translation=(0 0.0241 0) quadrant=-y
              radius=0.0035 length=0.0282
          WrapSphere ankle_sphere: translation=(0.00119 0.00233 0.00015) quadrant=all radius=0.0025
          WrapTorus ankle_torus: xyz_body_rotation=(1.570796 0 0) translation=(0.00119 0.00233 0.00015) quadrant=all
              inner_radius=0.001 outer_radius=0.004
          CustomJoint knee: parent_body=femur location_in_parent=(0 0 0) location=(0 0 0)
            Coordinate knee_flx: default_value=-2.094395 initial_value=-2.094395 tolerance=0.00000001 stiffness=0
                range=(-2.617994 -0.3490659) clamped=true restraint_active=false
            TransformAxis tx: coordinate=knee_flx is_rotation=false axis=(1 0 0)
              natCubicSpline: min_x=-1000000000000000000000000000000 max_x=1000000000000000000000000000000
                  min_y=-1000000000000000000000000000000 max_y=1000000000000000000000000000000
                  min_z=-1000000000000000000000000000000 max_z=1000000000000000000000000000000
                  x=(-2.617994 -2.443461 -2.268928 -2.094395 -1.919862 -1.745329 -1.570796 -1.396263 -1.22173 -1.047198 -0.8726646 -0.6981317 -0.5235988 -0.3490659)
                  y=(-0.02492 -0.0301 -0.03449 -0.03798 -0.04049 -0.04196 -0.04232 -0.04156 -0.03968 -0.0367 -0.03267 -0.02769 -0.02188 -0.01539)
            TransformAxis ty: coordinate=knee_flx is_rotation=false axis=(0 1 0)
              natCubicSpline: min_x=-1000000000000000000000000000000 max_x=1000000000000000000000000000000
                  min_y=-1000000000000000000000000000000 max_y=1000000000000000000000000000000
                  min_z=-1000000000000000000000000000000 max_z=1000000000000000000000000000000
                  x=(-2.617994 -2.443461 -2.268928 -2.094395 -1.919862 -1.745329 -1.570796 -1.396263 -1.22173 -1.047198 -0.8726646 -0.6981317 -0.5235988 -0.3490659)
                  y=(0.00082 -0.00322 -0.00805 -0.01353 -0.01952 -0.02588 -0.03244 -0.03905 -0.04552 -0.05167 -0.05732 -0.06229 -0.0664 -0.0695)
            TransformAxis tz: coordinate=knee_flx is_rotation=false axis=(0 0 1)
              natCubicSpline: min_x=-1000000000000000000000000000000 max_x=1000000000000000000000000000000
                  min_y=-1000000000000000000000000000000 max_y=1000000000000000000000000000000
                  min_z=-1000000000000000000000000000000 max_z=1000000000000000000000000000000
                  x=(-2.617994 -2.443461 -2.268928 -2.094395 -1.919862 -1.745329 -1.570796 -1.396263 -1.22173 -1.047198 -0.8726646 -0.6981317 -0.5235988 -0.3490659)
                  y=(0.00227 0.00198 0.00161 0.00117 0.00067 0.00013 -0.00043 -0.00101 -0.00157 -0.00211 -0.00261 -0.00305 -0.00342 -0.00371)
            TransformAxis r1: coordinate=knee_flx axis=(0 0 1)
            TransformAxis r2: coordinate=knee_flx axis=(1 0 0)
              natCubicSpline: min_x=-1000000000000000000000000000000 max_x=1000000000000000000000000000000
                  min_y=-1000000000000000000000000000000 max_y=1000000000000000000000000000000
                  min_z=-1000000000000000000000000000000 max_z=1000000000000000000000000000000
                  x=(-2.617994 -2.443461 -2.268928 -2.094395 -1.919862 -1.745329 -1.570796 -1.396263 -1.22173 -1.047198 -0.8726646 -0.6981317 -0.5235988 -0.3490659)
                  y=(-0.08726646 -0.07504916 -0.06457718 -0.05235988 -0.04014257 -0.0296706 -0.01745329 -0.00523599 0.00523599 0.01745329 0.0296706 0.04014257 0.05235988 0.06457718)
            TransformAxis r3: coordinate=knee_flx axis=(0 1 0)
              natCubicSpline: min_x=-1000000000000000000000000000000 max_x=1000000000000000000000000000000
                  min_y=-1000000000000000000000000000000 max_y=1000000000000000000000000000000
                  min_z=-1000000000000000000000000000000 max_z=1000000000000000000000000000000
                  x=(-2.617994 -2.443461 -2.268928 -2.094395 -1.919862 -1.745329 -1.570796 -1.396263 -1.22173 -1.047198 -0.8726646 -0.6981317 -0.5235988 -0.3490659)
                  y=(0.2617994 0.2617994 0.2617994 0.2617994 0.2617994 0.2617994 0.2617994 0.2617994 0.2617994 0.2617994 0.2617994 0.2617994 0.2617994 0.2617994)
        Body foot: mass=0.02 mass_center=(0.007 -0.005 0) inertia_xx=0.00000025 inertia_yy=0.00000162
            inertia_zz=0.00000162 meshes=foot.vtp
          CustomJoint ankle: parent_body=tibia location_in_parent=(0 0 0) location=(0 0 0)
            Coordinate ankle_flx: default_value=0.8726646 initial_value=0.8726646 tolerance=0.00000001 stiffness=0
                range=(-0.5235988 1.047198) clamped=true restraint_active=false
            Coordinate ankle_add: default_value=-0.08726646 initial_value=-0.08726646 tolerance=0.00000001 stiffness=0
                range=(-0.08726646 0.6108652) clamped=true restraint_active=false
            Coordinate ankle_int: default_value=0 initial_value=0 tolerance=0.00000001 stiffness=0
                range=(-0.8726646 0.2617994) clamped=true restraint_active=false
            TransformAxis tx: coordinate=ankle_flx is_rotation=false axis=(1 0 0)
              natCubicSpline: min_x=-1000000000000000000000000000000 max_x=1000000000000000000000000000000
                  min_y=-1000000000000000000000000000000 max_y=1000000000000000000000000000000
                  min_z=-1000000000000000000000000000000 max_z=1000000000000000000000000000000
                  x=(-0.5235988 -0.3490659 -0.1745329 0 0.1745329 0.3490659 0.5235988 0.6981317 0.8726646 1.047198)
                  y=(0 0 0 0 0 0 0 0 0 0)
            TransformAxis ty: coordinate=ankle_flx is_rotation=false axis=(0 1 0)
              natCubicSpline: min_x=-1000000000000000000000000000000 max_x=1000000000000000000000000000000
                  min_y=-1000000000000000000000000000000 max_y=1000000000000000000000000000000
                  min_z=-1000000000000000000000000000000 max_z=1000000000000000000000000000000
                  x=(-0.5235988 -0.3490659 -0.1745329 0 0.1745329 0.3490659 0.5235988 0.6981317 0.8726646 1.047198)
                  y=(0 0 0 0 0 0 0 0 0 0)
            TransformAxis tz: coordinate=ankle_flx is_rotation=false axis=(0 0 1)
              natCubicSpline: min_x=-1000000000000000000000000000000 max_x=1000000000000000000000000000000
                  min_y=-1000000000000000000000000000000 max_y=1000000000000000000000000000000
                  min_z=-1000000000000000000000000000000 max_z=1000000000000000000000000000000
                  x=(-0.5235988 -0.3490659 -0.1745329 0 0.1745329 0.3490659 0.5235988 0.6981317 0.8726646 1.047198)
                  y=(0 0 0 0 0 0 0 0 0 0)
            TransformAxis r1: coordinate=ankle_flx axis=(0 0 1)
            TransformAxis r2: coordinate=ankle_add axis=(1 0 0)
            TransformAxis r3: coordinate=ankle_int axis=(0 1 0)
      MarkerSet:
        Marker R_Iliac_Crest: pelvis (0.028 0.004 0.01)
        Marker R_Hip: pelvis (-0.005 0.005 0.01)
        Marker R_Knee: femur (0 -0.035 0)
        Marker R_Ankle: tibia (0 0 0.004)
        Marker R_Toe: foot (0.015 -0.005 0.005)
  ActuatorSet:
    Thelen2003Muscle [values shared by the 38 below unless stated]: muscle_model=9 tendon_slack_length=0
        activation_time_constant=0.01 deactivation_time_constant=0.04 Vmax=16.2979 Vmax0=8.1489 FmaxTendonStrain=0.033
        FmaxMuscleStrain=0.6 KshapeActive=0.5 KshapePassive=4 damping=0.05 Af=0.3 Flen=1.8
    Thelen2003Muscle BFa: max_isometric_force=3.4 optimal_fiber_length=0.0389 pennation_angle=0.00698132
      MusclePoint P1: spine (-0.0024 0.0045 0.0031)
      MusclePoint P2: femur (-0.0001 -0.0302 0.0016)
      MuscleWrap: wrap_object=hip_cylinder_large2 method=hybrid
      MuscleWrap: wrap_object=femur_prox method=hybrid
    Thelen2003Muscle BFp: max_isometric_force=12.5 optimal_fiber_length=0.0369 pennation_angle=0.127409 Vmax=15.4359
        Vmax0=7.718
      MusclePoint P1: pelvis (-0.0131 0.0024 -0.0023)
      MusclePoint P2: tibia (0.0035 0.0239 0.0026)
      MuscleWrap: wrap_object=femur_prox method=hybrid
      MuscleWrap: wrap_object=tibia_shaft method=hybrid
    Thelen2003Muscle CF: max_isometric_force=2.1 optimal_fiber_length=0.0372 pennation_angle=0
      MusclePoint P1: spine (-0.0039 0.0063 0.0035)
      MusclePoint P2: femur (-0.0025 -0.0262 -0.002)
      MuscleWrap: wrap_object=hip_cylinder_small method=hybrid
      MuscleWrap: wrap_object=femur_prox method=hybrid
    Thelen2003Muscle STp: max_isometric_force=3.4 optimal_fiber_length=0.0389 pennation_angle=0.00698132
      MusclePoint P1: spine (-0.0056 0.0041 0.0037)
      MusclePoint P2: tibia (0.0047 0.0231 0)
      MuscleWrap: wrap_object=femur_prox2 method=hybrid
      MuscleWrap: wrap_object=tibia_shaft2 method=hybrid
      MuscleWrap: wrap_object=hip_cylinder_small method=hybrid
    Thelen2003Muscle STa: max_isometric_force=12.5 optimal_fiber_length=0.0369 pennation_angle=0.127409 Vmax=15.4359
        Vmax0=7.718
      MusclePoint P1: pelvis (-0.0145 0.0012 -0.0009)
      MusclePoint P2: tibia (0.0047 0.0231 0)
      MuscleWrap: wrap_object=femur_prox method=hybrid
      MuscleWrap: wrap_object=tibia_shaft2 method=hybrid
    Thelen2003Muscle SM: max_isometric_force=10.3 optimal_fiber_length=0.035 pennation_angle=0
      MusclePoint P1: pelvis (-0.0137 -0.0011 -0.0037)
      MusclePoint P2: tibia (0.0022 0.035 -0.0026)
      MuscleWrap: wrap_object=tibia_shaft2 method=hybrid
    Thelen2003Muscle QF: max_isometric_force=3 optimal_fiber_length=0.0108 pennation_angle=0.05061455
      MusclePoint P1: pelvis (-0.0106 -0.0007 -0.0024)
      MusclePoint P2: femur (-0.0029 -0.0044 0.0011)
      MuscleWrap: wrap_object=femur_shaft_small method=hybrid
    Thelen2003Muscle TFL: max_isometric_force=2.9 optimal_fiber_length=0.015 pennation_angle=0.148353
      MusclePoint P1: pelvis (0.0213 0.0006 0.0026)
      MusclePoint P2: femur (0.0057 -0.0178 0.0031)
    Thelen2003Muscle GMa: max_isometric_force=9.3 optimal_fiber_length=0.0192 pennation_angle=0.2111848
      MusclePoint P1: spine (0.0202 0.0056 0.0041)
      MusclePoint P2: femur (-0.0015 -0.0098 0.0064)
      MuscleWrap: wrap_object=hip_cylinder_large2 method=hybrid
    Thelen2003Muscle GMe: max_isometric_force=18.8 optimal_fiber_length=0.0196 pennation_angle=0.2199115
      MusclePoint P1: pelvis (0.0202 0.004 -0.0001)
      MusclePoint P2: femur (-0.0027 -0.0033 0.0064)
      MuscleWrap: wrap_object=hip_cylinder_small2 method=hybrid
      MuscleWrap: wrap_object=femur_shaft_large method=hybrid
    Thelen2003Muscle GMi: max_isometric_force=7.4 optimal_fiber_length=0.0116 pennation_angle=0.286234
      MusclePoint P1: pelvis (0.013 0.0009 0.0004)
      MusclePoint P2: femur (-0.0004 -0.0001 0.0048)
    Thelen2003Muscle Pir: max_isometric_force=11.2 optimal_fiber_length=0.0106 pennation_angle=0.286234
      MusclePoint P1: pelvis (0.0114 0.0042 -0.0007)
      MusclePoint P2: femur (-0.0014 0.0009 0.004)
    Thelen2003Muscle GP: max_isometric_force=2.4 optimal_fiber_length=0.0287 pennation_angle=0.05759587
      MusclePoint P1: pelvis (-0.0148 -0.0055 -0.0063)
      MusclePoint P2: tibia (0.0049 0.0266 -0.0018)
      MuscleWrap: wrap_object=tibia_shaft2 method=hybrid
    Thelen2003Muscle GA: max_isometric_force=1.6 optimal_fiber_length=0.0297 pennation_angle=0
      MusclePoint P1: pelvis (-0.0065 -0.0059 -0.0061)
      MusclePoint P2: tibia (0.0032 0.0289 -0.0017)
      MuscleWrap: wrap_object=tibia_shaft2 method=hybrid
    Thelen2003Muscle AL: max_isometric_force=1 optimal_fiber_length=0.0163 pennation_angle=0.1692969 Vmax=5.7021
        Vmax0=2.8511
      MusclePoint P1: pelvis (-0.0045 -0.005 -0.0053)
      MusclePoint P2: femur (-0.0016 -0.017 0.0011)
    Thelen2003Muscle AM: max_isometric_force=3 optimal_fiber_length=0.0279 pennation_angle=0
      MusclePoint P1: pelvis (-0.0061 -0.0053 -0.0056)
      MusclePoint P2: femur (-0.0006 -0.03 -0.0031)
    Thelen2003Muscle AB: max_isometric_force=12.2 optimal_fiber_length=0.0224 pennation_angle=0.2251475
      MusclePoint P1: pelvis (-0.0107 -0.0058 -0.0066)
      MusclePoint P2: femur (-0.0016 -0.0164 0.0035)
    Thelen2003Muscle Pec: max_isometric_force=3.7 optimal_fiber_length=0.0081 pennation_angle=0.09773844
      MusclePoint P1: pelvis (0.0009 -0.0034 -0.0033)
      MusclePoint P2: femur (-0.0018 -0.0107 0.0019)
    Thelen2003Muscle IP: max_isometric_force=16.3 optimal_fiber_length=0.017 pennation_angle=0.1500983
      MusclePoint P1: spine (0.0537 0.005 0.003)
      MusclePoint P2: femur (-0.0021 -0.0053 0.0001)
    Thelen2003Muscle OE: max_isometric_force=7.2 optimal_fiber_length=0.0058 pennation_angle=0.2984513
      MusclePoint P1: pelvis (-0.0089 -0.0027 -0.0031)
      MusclePoint P2: femur (-0.0016 0.0005 0.0035)
    Thelen2003Muscle OI: max_isometric_force=3 optimal_fiber_length=0.0044 pennation_angle=0.1221731
      MusclePoint P1: pelvis (-0.0063 0.0048 -0.0026)
      MusclePoint P2: femur (-0.0019 0.0007 0.0024)
    Thelen2003Muscle GS: max_isometric_force=0.4 optimal_fiber_length=0.006 pennation_angle=0.1884956
      MusclePoint P1: pelvis (0.0029 0.0014 -0.0022)
      MusclePoint P2: femur (-0.0011 0.0015 0.0024)
    Thelen2003Muscle GI: max_isometric_force=2.9 optimal_fiber_length=0.0041 pennation_angle=0.3298672
      MusclePoint P1: pelvis (-0.0056 0.0024 -0.0013)
      MusclePoint P2: femur (-0.0031 -0.0007 0.0021)
    Thelen2003Muscle RF: max_isometric_force=16.5 optimal_fiber_length=0.0119 pennation_angle=0.1972222 Vmax=22.383
        Vmax0=11.1915
      MusclePoint P1: pelvis (0.0045 -0.0001 0.0015)
      MusclePoint P2: tibia (0.0026 0.0375 0.0005)
      MuscleWrap: wrap_object=femur_dist method=hybrid
      MuscleWrap: wrap_object=femur_shaft_small method=hybrid
    Thelen2003Muscle VL: max_isometric_force=14.9 optimal_fiber_length=0.0194 pennation_angle=0.2548181
      MusclePoint P1: femur (-0.0011 -0.0036 0.0056)
      MusclePoint P2: tibia (0.0026 0.0375 0.0005)
      MuscleWrap: wrap_object=femur_dist method=hybrid
      MuscleWrap: wrap_object=femur_shaft_small method=hybrid
    Thelen2003Muscle VI: max_isometric_force=2.6 optimal_fiber_length=0.0113 pennation_angle=0.2495821 Vmax=5.7021
        Vmax0=2.8511
      MusclePoint P1: femur (0.0008 -0.0116 0.0032)
      MusclePoint P2: tibia (0.0026 0.0375 0.0005)
      MuscleWrap: wrap_object=femur_dist method=hybrid
      MuscleWrap: wrap_object=femur_shaft_small method=hybrid
    Thelen2003Muscle VM: max_isometric_force=6.1 optimal_fiber_length=0.0153 pennation_angle=0.2024582 Vmax=10.7234
        Vmax0=5.3617
      MusclePoint P1: femur (-0.0002 -0.0074 0.0012)
      MusclePoint P2: tibia (0.0026 0.0375 0.0005)
      MuscleWrap: wrap_object=femur_dist method=hybrid
      MuscleWrap: wrap_object=femur_shaft_small method=hybrid
    Thelen2003Muscle MG: max_isometric_force=11.7 optimal_fiber_length=0.0143 pennation_angle=0.2373648
      MusclePoint P1: femur (-0.0027 -0.0278 -0.0021)
      MusclePoint P2: foot (-0.004 0.0004 0.001)
    Thelen2003Muscle LG: max_isometric_force=18.3 optimal_fiber_length=0.0123 pennation_angle=0.1675516
      MusclePoint P1: femur (-0.003 -0.0284 0.0017)
      MusclePoint P2: foot (-0.004 0.0004 0.001)
    Thelen2003Muscle Pla: max_isometric_force=5.6 optimal_fiber_length=0.0123 pennation_angle=0.1972222
      MusclePoint P1: femur (-0.0023 -0.0275 0.0011)
      MusclePoint P2: foot (-0.004 0.0004 0.001)
    Thelen2003Muscle Sol: max_isometric_force=1.4 optimal_fiber_length=0.0156 pennation_angle=0.07679449 Vmax=10.7234
        Vmax0=5.3617
      MusclePoint P1: tibia (-0.0033 0.0335 0.0024)
      MusclePoint P2: foot (-0.004 0.0004 0.001)
    Thelen2003Muscle TA: max_isometric_force=8.6 optimal_fiber_length=0.0149 pennation_angle=0.164061 Vmax=19.3191
        Vmax0=9.6596
      MusclePoint P1: tibia (0.0033 0.0336 0.0026)
      MusclePoint P2: foot (0.0048 -0.0022 -0.0007)
      MuscleWrap: wrap_object=ankle_sphere method=hybrid
      MuscleWrap: wrap_object=ankle_torus method=hybrid
    Thelen2003Muscle EDL: max_isometric_force=2.2 optimal_fiber_length=0.0134 pennation_angle=0.1850049
      MusclePoint P1: tibia (0.0012 0.0392 0.0028)
      MusclePoint P2: foot (0.0034 -0.0017 0.0011)
      MuscleWrap: wrap_object=ankle_sphere method=hybrid
      MuscleWrap: wrap_object=ankle_torus method=hybrid
    Thelen2003Muscle TP: max_isometric_force=3.6 optimal_fiber_length=0.0053 pennation_angle=0.09948377
      MusclePoint P1: tibia (-0.0015 0.0339 0.0001)
      MusclePoint P2: foot (-0.0007 -0.0017 -0.0011)
      MuscleWrap: wrap_object=ankle_sphere method=hybrid
      MuscleWrap: wrap_object=ankle_torus method=hybrid
    Thelen2003Muscle FDL: max_isometric_force=11.1 optimal_fiber_length=0.0088 pennation_angle=0.1937316
      MusclePoint P1: tibia (-0.0025 0.0354 0)
      MusclePoint P2: foot (-0.0007 -0.0017 -0.0011)
      MuscleWrap: wrap_object=ankle_sphere method=hybrid
      MuscleWrap: wrap_object=ankle_torus method=hybrid
    Thelen2003Muscle FHL: max_isometric_force=0.2 optimal_fiber_length=0.0054 pennation_angle=0.02268928
      MusclePoint P1: tibia (-0.0015 0.0339 0.0001)
      MusclePoint P2: foot (-0.0007 -0.0017 -0.0011)
      MuscleWrap: wrap_object=ankle_sphere method=hybrid
      MuscleWrap: wrap_object=ankle_torus method=hybrid
    Thelen2003Muscle Per: max_isometric_force=7.7 optimal_fiber_length=0.0088 pennation_angle=0.1099557
      MusclePoint P1: tibia (-0.0019 0.0353 0.0029)
      MusclePoint P2: foot (0.0028 -0.0027 0.0017)
      MuscleWrap: wrap_object=ankle_sphere method=hybrid
      MuscleWrap: wrap_object=ankle_torus method=hybrid
    Thelen2003Muscle Pop: max_isometric_force=2.9 optimal_fiber_length=0.0063 pennation_angle=0.2426008
      MusclePoint P1: femur (-0.0024 -0.0308 0.0017)
      MusclePoint P2: tibia (0.0006 0.0271 -0.0023)
      MuscleWrap: wrap_object=tibia_prox method=hybrid
    ObjectGroup hamstrings: members=(BFa BFp CF GA GP SM STa STp)
    ObjectGroup hip_cuffs: members=(GI GS OE OI Pir QF)
    ObjectGroup hip_flexors: members=(IP Pec TFL)
    ObjectGroup gluteals: members=(GMa GMe GMi)
    ObjectGroup adductors: members=(AB AL AM GA GP)
    ObjectGroup quadriceps: members=(RF VI VL VM)
    ObjectGroup calf_muscles: members=(LG MG Pla Sol)
    ObjectGroup anterior_crural: members=(EDL TA)
    ObjectGroup posterior_crural: members=(FDL FHL TP)
    ObjectGroup others: members=(Per Pop)
