# OpenSim document version 30000
Model Rat Hindlimb with Pin joints:
  credits: Model authors names..
  publications: List of publications related to model...
  length_units: mm
  force_units: N
  gravity: 0 0 0
  BodySet:
    Body ground: mass=0 mass_center=(0 0 0) inertia_xx=1 inertia_yy=1 inertia_zz=1
        meshes=(checkered_floor.vtp RatModel/Geometry/spine.vtp)
    Body pelvis: mass=0.02 mass_center=(0 0 0) inertia_xx=4e-6 inertia_yy=3.5e-6 inertia_zz=3.5e-6
        meshes=RatModel/Geometry/pelvis.vtp
      PinJoint sacroiliac_pin_joint: parent_body=ground location_in_parent=(0.027 0.077 -0.003) location=(0 0 0)
        Coordinate sacroiliac_pin_joint_rot: motion_type=rotational default_value=-1.047 range=(-1.57 0.4)
            clamped=false
    Body femur: mass=0.02 mass_center=(0 -0.015 0) inertia_xx=1.62e-6 inertia_yy=2.5e-7 inertia_zz=1.62e-6
        meshes=RatModel/Geometry/femur.vtp
      PinJoint hip_pin_joint: parent_body=pelvis location_in_parent=(0.0275 0 0) orientation_in_parent=(3.14 0 -1.57)
          location=(0 0 0)
        Coordinate hip_pin_joint_rot: motion_type=rotational default_value=-1.047 range=(-3 -0.5) clamped=true
    Body tibia: mass=0.02 mass_center=(0 0.015 0) inertia_xx=1.62e-6 inertia_yy=2.5e-7 inertia_zz=1.62e-6
        meshes=RatModel/Geometry/tibia.vtp
      PinJoint knee_pin_joint: parent_body=femur location_in_parent=(0 -0.03 0) orientation_in_parent=(0 3.14 0)
          location=(0 0.035 0)
        Coordinate knee_pin_joint_rot: motion_type=rotational default_value=1.57 range=(0 2.8) clamped=true
    Body foot: mass=0.02 mass_center=(0.007 -0.005 0) inertia_xx=2.5e-7 inertia_yy=1.62e-6 inertia_zz=1.62e-6
        meshes=RatModel/Geometry/foot.vtp
      PinJoint ankle_pin_joint: parent_body=tibia location_in_parent=(0 0 0) orientation_in_parent=(0 3.14 0)
          location=(0 0 0)
        Coordinate ankle_pin_joint_rot: motion_type=rotational default_value=0 range=(-1 1) clamped=true
  ForceSet:
    CoordinateLimitForce sacroiliac_pin_joint_limit: coordinate=sacroiliac_pin_joint_rot
        upper_stiffness=20 [N*m/degree] upper_limit=0 [degrees] lower_stiffness=20 [N*m/degree]
        lower_limit=-80 [degrees] damping=1 transition=5 [degrees] compute_dissipation_energy=false
    CoordinateLimitForce hip_pin_joint_limit: coordinate=hip_pin_joint_rot upper_stiffness=20 upper_limit=-45
        lower_stiffness=20 lower_limit=-90 damping=1 transition=5 compute_dissipation_energy=false
    CoordinateLimitForce ankle_pin_joint_limit: coordinate=ankle_pin_joint_rot upper_stiffness=20 upper_limit=45
        lower_stiffness=20 lower_limit=-45 damping=1 transition=5 compute_dissipation_energy=false
  ContactGeometrySet:
    ContactHalfSpace ground_platform: body_name=ground location=(0 0 0) orientation=(0 0 -1.570796)
    ContactSphere toe_1: body_name=foot location=(0.017 -0.01 -0.004) radius=0.0015
    ContactSphere toe_2: body_name=foot location=(0.025 -0.012 -0.001) radius=0.0015
    ContactSphere toe_3: body_name=foot location=(0.026 -0.0125 0.003) radius=0.0015
    ContactSphere toe_4: body_name=foot location=(0.024 -0.0125 0.00625) radius=0.0015
    ContactSphere toe_5: body_name=foot location=(0.016 -0.011 0.007) radius=0.0015
    ContactSphere heel: body_name=foot location=(-0.005 -0.002 0.001) radius=0.003
