# OpenSim document version 30000
Model:
  ForceSet:
    Millard2012EquilibriumMuscle fatigable: min_control=0 max_control=1 max_isometric_force=1000
        optimal_fiber_length=0.2 tendon_slack_length=0.1 pennation_angle_at_optimal=0 [radians]
        default_fiber_length=0.2 default_activation=0.01 fatigue_factor=0.3 recovery_factor=0.2
      PathPoint muscle1-point1: ground (0 0.05 -0.35)
      PathPoint muscle1-point2: block (0 0 -0.05)
      MuscleFirstOrderActivationDynamicModel:
        minimum_activation: 0.01
      ActiveForceLengthCurve
      ForceVelocityInverseCurve
      FiberForceLengthCurve
      TendonForceLengthCurve
    Millard2012EquilibriumMuscle original: min_control=0 max_control=1 max_isometric_force=1000
        optimal_fiber_length=0.2 tendon_slack_length=0.1 pennation_angle_at_optimal=0 default_fiber_length=0.2
        default_activation=0.01
      PathPoint muscle2-point1: ground (0 0.05 0.35)
      PathPoint muscle2-point2: block (0 0 0.05)
      MuscleFirstOrderActivationDynamicModel:
        minimum_activation: 0.01
      ActiveForceLengthCurve
      ForceVelocityInverseCurve
      FiberForceLengthCurve
      TendonForceLengthCurve
